# " Упражнение 1"
# "1"
sqrt(100) = 10
|-10| = 10
10! = 3628800
# "2"
a := 3.4
b := 6.22
c ≡ 0.149
# "3"
Z := (2*a*b + nthroot(c, 3))/sqrt((a^2 + b^(a + c))*c) = 4.29283
N := e^sin(c)*cos(a/b) = 0.990999
# "4"
π = 3.14159
Z := -3 + 2i
|Z| = 3.60555
Re(Z) = -3
Im(Z) = 2
arg(Z) = 2.55359
# "5"
sqrt(Z) = 0.550251 + 1.81735i
sqrt(-5) = 2.23607i
2*Z = -6 + 4i
Z1 := 1 + 2i
Z2 := 3 + 4i
Z1 + Z2 = 4 + 6i
Z1 - Z2 = -2 - 2i
Z1*Z2 = -5 + 10i
Z1/Z2 = 0.44 + 0.08i
# "Упражнение 2"
i := 0, 1 .. 4
d[i] := 0.5, 1, 1.5, 2, 2.5
S[i] := 3.3, 5.9, 7, 6.3, 4.2
R[i] := 2, 3.9, 4.5, 3.7, 1.2
R[i]*d[i] = [1; 3.9; 6.75; 7.4; 3]
S[i]*d[i] = [1.65; 5.9; 10.5; 12.6; 10.5]
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# "Упражнение 3"
α := 0, π/30 .. 2*π
X(α) := cos(α)*sin(α)
P(α) := cos(α)
Y(α) := 1.5*cos(α)^2 - 1
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α := π/2
X(α) := cos(α)*sin(α)
Y(α) := 1.5*cos(α)^2 - 1
X(α) = 6.12303e-17
Y(α) = -1
# "Упражнение 4"
Q := [
    1, 5, 8, 7, 5, 1;
    2, 8, 9, 3, 7, 5;
    8, 6, 3, 7, 2, 1;
    7, 9, 8, 2, 5, 6;
    8, 5, 3, 5, 4, 6;
    1, 2, 4, 8, 9, 3
]
# [component: inputs Q]
